# Tuned Mass Damper Optimization
# Single Degree of Freedom System with a Single Tuned Mass Damper
m_1 := 1 kg
k_1 := 1 N/m
c_1 := 0.01 N*s/m
f_1 := 1 N
m_2 := 0.1 kg
# Parameters to be optimized:
k_2 := transpose([0.001, 0.01, 0.1, 1]) N/m
c_2 := transpose([0.001, 0.01, 0.1, 1]) N*s/m
X(ω, k_2, c_2) := vectorize(|lsolve(-ω^2*[m_1, 0; 0, m_2] + sqrt(-1)*ω*[c_1 + c_2, -c_2; -c_2, c_2] + [k_1 + k_2, -k_2; -k_2, k_2], [f_1; 0])|)
x_1(ω, k_2, c_2) := X(ω, k_2, c_2)[0]
ω_1 := 0.7 rad/s
ω_2 := 1.2 rad/s
ω_inc := 0.001 rad/s
ω := ω_1, ω_1 + ω_inc .. ω_2
# [chart]
    X[1] := ω
    X[2] := ω
    Y[1] := x_1(ω, k_2[0], c_2[0])
    Y[2] := x_1(ω, k_2[1], c_2[0])
    X[3] := ω
    X[4] := ω
    Y[3] := x_1(ω, k_2[2], c_2[0])
    Y[4] := x_1(ω, k_2[3], c_2[0])
# [chart]
    X[1] := ω
    X[2] := ω
    Y[1] := X(ω, k_2[2], c_2[0])[0]
    Y[2] := X(ω, k_2[2], c_2[1])[0]
    X[3] := ω
    X[4] := ω
    Y[3] := X(ω, k_2[2], c_2[2])[0]
    Y[4] := X(ω, k_2[2], c_2[3])[0]
# Optimizing the area under the curve
ω_1 := 0.7 rad/s
ω_2 := 1.2 rad/s
I(k_2, c_2) := integral(X(ω, k_2, c_2)[0], ω = ω_1 .. ω_2)
I(0.1 N/m, 0.001 N*s/m) = 3.49705 m/s
solve block
    # guess values
    k_2 := 0.1 N/m
    c_2 := 0.01 N*s/m
    # constraints
    k_2 > 0*N/m
    c_2 > 0*N*s/m
    # solver
    [k_2imin; c_2imin] := minimize(I, k_2, c_2) = [0.0918482 kg/s^2; 0.0242536 kg/s]
end solve block
# [chart]
    X[1] := ω
    X[2] := ω
    Y[1] := X(ω, k_2imin, c_2imin)[0]
    Y[2] := X(ω, 0 N/m, 0 N*s/m)[0]
# Optimizing the peak point
ω_undamped_peak(k_2, c_2) := sqrt(eigenvals([m_1, 0; 0, m_2]^-1*[k_1 + k_2, -k_2; -k_2, k_2]))
p(k_2, c_2) :=
    ω ← ω_undamped_peak(k_2, c_2)[0]
    x_temp1(ω) ← x_1(ω, k_2, c_2)
    ω_peak1 ← maximize(x_temp1, ω)
    ω ← ω_undamped_peak(k_2, c_2)[1]
    x_temp2(ω) ← x_1(ω, k_2, c_2)
    ω_peak2 ← maximize(x_temp2, ω)
    x_peak ← max(x_temp1(ω_peak1), x_temp2(ω_peak2))
    return x_peak
solve block
    # guess values
    k_2 := 0.1 N/m
    c_2 := 0.01 N*s/m
    # constraints
    k_2 > 0*N/m
    c_2 > 0*N*s/m
    # solver
    [k_2pmin; c_2pmin] := minimize(p, k_2, c_2) = [0.0822394 kg/s^2; 0.0348854 kg/s]
end solve block
# [chart]
    X[1] := ω
    X[2] := ω
    Y[1] := X(ω, k_2pmin, c_2pmin)[0]
    Y[2] := X(ω, k_2imin, c_2imin)[0]
# Single Degree of Freedom System with Double Tuned Mass Damper
m_1 := 1 kg
k_1 := 1 N/m
c_1 := 0.01 N*s/m
f_1 := 1 N
X(ω, m_2, k_2, k_3, c_2, c_3) := vectorize(|lsolve(-ω^2*[m_1, 0, 0; 0, m_2, 0; 0, 0, 0.1 kg - m_2] + sqrt(-1)*ω*[c_1 + c_2 + c_3, -c_2, -c_3; -c_2, c_2, 0; -c_3, 0, c_3] + [k_1 + k_2 + k_3, -k_2, -k_3; -k_2, k_2, 0; -k_3, 0, k_3], [f_1; 0; 0])|)
x_1(ω, k_2, c_2) := X(ω, k_2, c_2)[0]
ω_undamped_peak(m_2, k_2, k_3, c_2, c_3) := sqrt(eigenvals([m_1, 0, 0; 0, m_2, 0; 0, 0, 0.1 kg - m_2]^-1*[k_1 + k_2 + k_3, -k_2, -k_3; -k_2, k_2, 0; -k_3, 0, k_3]))
p(m_2, k_2, k_3, c_2, c_3) :=
    ω ← ω_undamped_peak(m_2, k_2, k_3, c_2, c_3)[0]
    x_temp1(ω) ← x_1(ω, m_2, k_2, k_3, c_2, c_3)
    ω_peak1 ← maximize(x_temp1, ω)
    ω ← ω_undamped_peak(m_2, k_2, k_3, c_2, c_3)[1]
    x_temp2(ω) ← x_1(ω, m_2, k_2, k_3, c_2, c_3)
    ω_peak2 ← maximize(x_temp2, ω)
    ω ← ω_undamped_peak(m_2, k_2, k_3, c_2, c_3)[2]
    x_temp3(ω) ← x_1(ω, m_2, k_2, k_3, c_2, c_3)
    ω_peak3 ← maximize(x_temp3, ω)
    x_peak ← max(x_temp1(ω_peak1), x_temp2(ω_peak2), x_temp3(ω_peak3))
    return x_peak
solve block
    # guess values
    m_2 := 0.05 kg
    k_2 := 0.1 N/m
    k_3 := 0.1 N/m
    c_2 := 0.001 N*s/m
    c_3 := 0.001 N*s/m
    # constraints
    m_2 > 0*kg
    k_2 > 0*N/m
    k_3 > 0*N/m
    c_2 > 0*N*s/m
    c_3 > 0*N*s/m
    # solver
    minimize(p, m_2, k_2, k_3, c_2, c_3) =  # error: This function accepts at most {0} arguments but is applied to {1}.
end solve block
